// SBML level 2 version 4

model Schlogl()

  // Compartments:
  compartment compartment = 1;

  // Species:
  species $A in compartment = 100000;
  species X in compartment = 250;
  species $B in compartment = 200000;

  // Parameters:
  QA = 200000;

  // Reactions:
  reaction_1: $A + 2 X => 3 X; compartment*reaction_1_k1*A*X^2;
    reaction_1_k1 = 3e-7;
  reaction_2: 3 X => $A + 2 X; compartment*reaction_2_k1*X^3;
    reaction_2_k1 = 0.0001;
  reaction_3: $B => X; compartment*reaction_3_k1*B;
    reaction_3_k1 = 0.001;
  reaction_4: X => $B; compartment*reaction_4_k1*X;
    reaction_4_k1 = 3.5;

  // Unit definitions:
  unit volume = dimensionless;
  unit time = dimensionless;
  unit substance = item;
end
